## DESIGN DATA
# assume trial depth of slab
h := [153; 153]*mm  # thickness
f_cu := 40 MPa  # cube strength
f_ck := 32 MPa  # cylinder strength
f_cm := f_ck + 8 MPa
f_cm = 40 MPa
f_ctm := 0.3*(f_ck/MPa)^(2/3)*MPa
f_ctk0.05 := 0.7*f_ctm
# characteristic axial tensile strength of concrete
# (5% fractile) (N/mm2)
5*sqrt(f_ck*psi) = 2.34858 MPa
f_ctk0.05 = 2.11667 MPa
E_cm := 22*kN/mm^2*(f_cm/(10 MPa))^0.3  # secant modulus of elasticity of concrete (kN/mm2)
57000*sqrt(f_ck*psi) = 26.7738 kN/mm^2
E_cm = 33.3458 kN/mm^2
k := 25*kPa/mm  # modulus of subgrade reaction (N/mm3), approximated from draft geotech report CBR=10 and Fig 3.3, ACI 360R-06
0.3*(f_ck/MPa)^(2/3)*MPa = 3.02381 MPa
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k = 13262.3 pounds_per_sq_foot/in
200 kPa = 29.0075 psi
ν := 0.2  # concrete Posison's ratio
## partial safety factors - ultimate state
1/1.5 = 0.666667
γ_c := 1/0.6  # safety factor for plain concrete per AS3600/ACI 318
γ_s := 1/0.9  # safety factor for steel reinforcement
psi/in = 0.000271447 MPa/mm
γ_DL := 1.2  # load factors for permanent dead load,
MPa/mm = 3683.96 psi/in
γ_dyn := 1.6  # wheel loads, and
γ_LL := 1.5  # static live loads
# concrete flexural strength
f_ctk_η :=
    for i ∈ 0 .. length(h) - 1
        tmp[i] ← min(2*f_ctk0.05, f_ctk0.05*(1 + sqrt(200 mm/h[i])))
    tmp
f_ctk_η = [4.23333; 4.23333] MPa
# radius of relative stiffness
l_r := nthroot(E_cm*h^3/(12*(1 - ν)*k), 4)
# for slab thicknesses of
h = [0.153; 0.153] m
l_r = [839.897; 839.897] mm
## Negative (hogging) moment capacity
# using a recommended net restraint stress of 1.5MPa, TR-34 2003, sec 9.12.3
ϕM_n := vectorize((f_ctk_η - 1.5 MPa)/γ_c*h^2/6)
1/(1 - nthroot(1 - 0.02, 1)) = 50
ϕM_n = [6398.46; 6398.46] N
## Positive  (sagging) moment capacity
R_e3 := 0
# - 0.5 if sufficient steel fiber reinforcement added, or
# - 0.3 if synthetic fiber reinforced and can be demonstrated to have minimum ductility
# - 0 for plain concrete
50/.02 = 2500
DB := [16 mm; 16 mm]  # tension reinforcement, if provided
f_y := 500 MPa  # reduced yield stress, per ACI360R-06
1/0.02*50 = 2500
h = [0.153; 0.153] m
1/□ =  # error: This placeholder is empty.
s_cc := 200 mm  # spacing/unit width of tension reinforcement
cover := 75 mm
1/0.02 = 50
d := h - cover - 1.5*DB
ρ := π/4*DB^2/(s_cc*d)
350 kph = 97.2222 m/s
ρ = [1.86168; 1.86168] %  # recommended reinf ratio shall be 0.1-0.125% (Informative )
# [area: reinforcement capacity functions]
fφMn(f_c, f_y, DB, s_cc, h_f, cover, d) :=
    γ_1 ← 0.85 - 0.007*(f_c/MPa - 28)
    γ ←
        0.65 if γ_1 < 0.65
        0.85 if γ_1 > 0.85
        γ_1 otherwise
    A_st ← π/4*DB^2
    ρ ← A_st/(s_cc*d)
    a ← A_st*f_y/(0.85*f_c*s_cc)
    k_u ← a/(γ*d)
    0.8*(0.85*f_c*a*(d - a/2)) if k_u < 0.4
    "check ku" otherwise
fφVn(f_c, f_y, DB, s_cc, h_f, cover, d) :=
    β_1 ← max(1.1, 1.1*(1.6 - d/(mm*1000)))
    β_2 ← 1
    β_3 ← 1
    A_st ← π/4*DB^2
    0.7*(β_1*β_2*β_3*d*(A_st/(s_cc*d)*f_c/MPa)^(1/3)*MPa)
500 MPa/(200 GPa) = 0.25 %
ϕM_p := vectorize(fφMn(f_ck, f_y, DB, s_cc, h, cover, d) + f_ctk_η/γ_c*R_e3)  # error: This value must be a scalar or a matrix.
fφMn(32 MPa, 500 MPa, 25 mm, 300 mm/4, 300 mm, 50 mm, 300 mm - (50 mm + 1.5*25*mm)) = "check ku"
ϕM_p =  # error: This variable is undefined.
ϕM_p :=
    for i ∈ 0 .. length(h) - 1
        tmp[i] ← min(ϕM_p[i], ϕM_n[i])
    tmp
ϕM_p =  # error
# Note:
# Per TR 34 recommendation, the Mp <=Mn to ensure adequate rotational capacity
## Materials Handling Equipment - wheel load
W_total := 77842 kgf  # gross operating empty
P_axle := 52 %*W_total  # axle load
P_axle = 396.952 kN
P_wheel := P_axle/2
p_tire := 483 kPa  # tire pressure, cat performance handbook, whwwl loaders 990 series II
A_contact := P_wheel/p_tire
14 in = 0.3556 m
a := 250 mm
a = 250 mm
P_u_wheel := P_wheel*γ_dyn
P_u_wheel = 317.562 kN
# [area: common functions]
DesignCheck(cap, action) :=
    r ← action/cap
    [r; " -------FAIL--------"] if r > 1.0
    [r; "--------PASS---------"] otherwise
## Internal loading (single point load)
i_int := 0
fϕP_n1int(ϕM_n, ϕM_p, l_r, a) :=
    ϕP_0 ← 2*π*(ϕM_n + ϕM_p)
    ϕP_0.2 ← 4*π*(ϕM_n + ϕM_p)/(1 - a/(3*l_r))
    vx ← transpose([0, 0.2])
    vy ← transpose([ϕP_0, ϕP_0.2])
    ϕP_0.2 if a/l_r > 0.2
    linterp(vx, vy, a/l_r) otherwise
2*π*(ϕM_n + ϕM_p) =  # error
ϕM_n = [6398.46; 6398.46] N
4*π*(ϕM_n + ϕM_p)/(1 - a/(3*l_r)) =  # error
l_r = [839.897; 839.897] mm
ϕM_p =  # error
ϕP_n_wheel := vectorize(fϕP_n1int(ϕM_n, ϕM_p, l_r, a))[i_int]
ϕP_n_wheel =  # error
DesignCheck(ϕP_n_wheel, P_u_wheel) =  # error
# for slab thickness of
h[i_int] = 153 mm
ϕP_n_wheel =  # error
# wheel spacing
k_s := □  # error: This placeholder is empty.
x := 2500 mm
x = 2.5 m
## Internal loading (dual point loads)
# total collapse load
25 in = 0.635 m
fϕP_n2int(ϕM_n, ϕM_p, l_r, a, x) :=
    ϕP_0 ← (2*π + 1.8*x/l_r)*(ϕM_n + ϕM_p)
    ϕP_0.2 ← (4*π/(1 - a/(3*l_r)) + 1.8*x/(l_r - a/2))*(ϕM_n + ϕM_p)
    vx ← transpose([0, 0.2])
    vy ← transpose([ϕP_0, ϕP_0.2])
    ϕP_0.2 if a/l_r > 0.2
    linterp(vx, vy, a/l_r) otherwise
ϕM_n = [6.39846; 6.39846] kN
(2*π + 1.8*x/l_r)*(ϕM_n + ϕM_p) =  # error
(4*π/(1 - a/(3*l_r)) + 1.8*x/(l_r - a/2))*(ϕM_n + ϕM_p) =  # error
l_r = [839.897; 839.897] mm
ϕP_n_axle := vectorize(fϕP_n2int(ϕM_n, ϕM_p, l_r, a, x))[i_int]
ϕP_n_axle =  # error
P_u_axle := γ_dyn*P_axle
DesignCheck(ϕP_n_axle, P_u_axle) =  # error
# for slab thickness of
h[i_int] = 153 mm
ϕP_n_axle =  # error
## Edge loading (dual wheels)
i_ext := 1
fϕP_nedge(ϕM_n, ϕM_p, l_r, a) :=
    ϕP_0 ← π*(ϕM_n + ϕM_p)/2 + 2*ϕM_n
    ϕP_0.2 ← (π*(ϕM_n + ϕM_p) + 4*ϕM_n)/(1 - 2*a/(3*l_r))
    vx ← transpose([0, 0.2])
    vy ← transpose([ϕP_0, ϕP_0.2])
    ϕP_0.2 if a/l_r > 0.2
    linterp(vx, vy, a/l_r) otherwise
π*(ϕM_n + ϕM_p)/2 + 2*ϕM_n =  # error
a = 0.25 m
l_r = [0.839897; 0.839897] m
vectorize(a/l_r) = [0.297656; 0.297656]
# edge capacity adjusted for dual wheel loads
vectorize(fϕP_nedge(ϕM_n, ϕM_p, l_r, a))[i_ext] =  # error
ϕP_n_axle := vectorize(fϕP_n2int(ϕM_n, ϕM_p, l_r, a, x))[i_int]  # dual internal
f_dual := vectorize(ϕP_n_axle/(2*ϕP_n_wheel))
# divided by 2 times internal wheel load to get the scaling
# factor for edge loading
f_dual =  # error
f_dual =  # error
ϕP_n_edge := vectorize(fϕP_nedge(ϕM_n, ϕM_p, l_r, a))[i_ext]*f_dual
ϕP_n_edge =  # error
# for slab thickness of
h[i_ext] = 0.153 m
DesignCheck(ϕP_n_edge, P_u_wheel) =  # error
ϕP_n_edge =  # error
## punching, at edge
b_pad := a
i_punch := 1
h = [0.153; 0.153] m
transpose(d) = [0.054, 0.054] m
u_om := 3*(b_pad + d)  # on edge
fϕV_uo(d, f_c, β_h, u_om) := 0.7*u_om*d*{
    f_cv ← 0.17*(1 + 2/β_h)*sqrt(f_c*MPa)
    f_cv if f_cv ≤ 0.34*sqrt(f_c*MPa)
    0.34*sqrt(f_c*MPa) otherwise
}
β_h := 1
u_om = [0.912; 0.912] m
b_tire := 850 mm  # disabled
ϕV_n := vectorize(fϕV_uo(d, f_ck, β_h, u_om))
x_Pw := 3576 mm  # disabled  # wheel centerline distance
ϕV_n = [66.3041; 66.3041] kN
x_R := x_Pw - 2*b_tire  # disabled  # distance to jack from far side wheel
γ_dyn = 1.6
P_axle = 396.952 kN
I_F := x_Pw/x_R
V_u := γ_dyn*P_wheel
V_u = 317.562 kN
DesignCheck(ϕV_n[i_punch], V_u) = [4.78947; " -------FAIL--------"]
## punching, at interior
b_pad := a
i_punch := 0
h = [0.153; 0.153] m
transpose(d) = [0.054, 0.054] m
u_om := 4*(b_pad + d)
u_om = [1.216; 1.216] m
ϕV_n := vectorize(fϕV_uo(d, f_ck, β_h, u_om))
ϕV_n = [88.4055; 88.4055] kN
γ_dyn = 1.6
P_axle = 396.952 kN
V_u := γ_dyn*P_wheel
V_u = 317.562 kN
DesignCheck(ϕV_n[i_punch], V_u) = [3.5921; " -------FAIL--------"]
## Dowel design
L_slab := 7 m
α_strains := 600*10^-6
d_dow := 20 mm  # dowel diameter
s_dow := 300 mm  # spacing
# length of slab panel
L_dow := 350 mm  # overall length
# shrinkage coefficient
f_ydow := 235 MPa  # yield stress of dowel material
## Deflection Check
# edge capacity of slab, at interior thickness
C_δ := [0.125; 0.125; 0.442]  # disabled  # coef of deflection for internal (same as jacking location) and edge loading, respectively
ϕP_slab := vectorize(fϕP_nedge(ϕM_n, ϕM_p, l_r, a))[i_int]*ϕP_n_axle/(2*ϕP_n_wheel)
ϕP_slab =  # error
δ_slab := vectorize(C_δ*P_wheel/(k*l_r^2))  # disabled
δ_slab =  # no stored result; disabled
[0.125; 0.442]
P_u_dowel := max(0, P_wheel*γ_dyn - ϕP_slab, P_u_rig - ϕP_slab)
# load to be transferred across the joint
P_u_dowel =  # error
# shear capacity of dowels
A_v := π/4*d_dow^2
n_dow_eff := floor(1.8*l_r[0]/s_dow)  # effective number of dowels
n_dow_eff = 5
ϕP_sh := 0.6*f_ydow*A_v/γ_s*n_dow_eff
ϕP_sh = 199.334 kN
# bearing capacity of dowels
b_1 := 8*d_dow
ϕP_bear := 0.5*f_cu/γ_c*b_1*d_dow*n_dow_eff
ϕP_bear = 192 kN
# bending capacity of dowels
x_shrinkage := α_strains*L_slab  # estimated drying shrinkage
x_shrinkage = 4.2 mm  # ignoring creep and restraints
Z_p := d_dow^3/4
ϕP_bend := 2*f_ydow/γ_s*Z_p/x_shrinkage*n_dow_eff
ϕP_bend = 1007.14 kN
# bursting (punching) capacity of dowels
d_c := h[0]/2  # dowel at midheight
k_1 := min(2.0, 1 + sqrt(200 mm/vectorize(d_c)))
k_1 = 2
ρ_x := π/4*DB^2/(s_cc*d[0])
ρ_y := ρ_x
ρ_1 := sqrt(ρ_x*ρ_y)
# average shear stress
8*d_dow = 0.16 m
ϕv_Rdc := max(0.18/γ_c*k_1*(100*ρ_1*f_ck/MPa)^(1/3), 0.035*k_1^(3/2)*sqrt(f_ck/MPa))*MPa
# assuming overlapping critical perimeter
r_o := min(s_dow/2, 2*d_c)  # critical radius for shear, per dowel
r_o = 0.15 m
b_o := 2*(min(8*d_dow, L_dow/2) + r_o*π/2) + (n_dow_eff - 1)*s_dow  # critical perimeter, per dowel
n_dow_eff = 5
(n_dow_eff - 1)*s_dow = 1.2 m
b_o = 1.99124 m
l_r = [0.839897; 0.839897] m
ϕP_burst := ϕv_Rdc*b_o*d_c
ϕP_burst = 144.243 kN
# dowel check against bending
DesignCheck(ϕP_bend, P_u_dowel) =  # error
P_u_dowel =  # error
# dowel check agains shear
DesignCheck(ϕP_sh, P_u_dowel) =  # error
# dowel check against combined shear and bending
r := P_u_dowel/ϕP_bend + P_u_dowel/ϕP_sh
# note :
# r <=1.4
DesignCheck(1.4, r) =  # error
# dowel check agains bearing
DesignCheck(ϕP_bear, P_u_dowel) =  # error
# dowel check agains dowel bursting
DesignCheck(ϕP_burst, P_u_dowel) =  # error
# with N12-200 U bars provided to reinforce the bursting capacity of dowel.
